# 1)
A := [2; 2; 3]
B := [2; -1; 3]
D := [3; 1; 2]
A_1 := [2; 3; 1]
AB := B - A = [0; -3; 0]
AD := D - A = [1; -1; -1]
# Можно, так как вектора линейно независимы
|AB| = 3
||AD|| = 1.73205
# 2)
O := (B + D)/2 = [2.5; 0; 2.5]
BO := O - B = [0.5; 1; -0.5]
AO := O - A = [0.5; -2; -0.5]
a := AO*BO/(||AO||*||BO||) = -0.57735
b := acos(a)*180/π = 125.264
c := 180 - b = 54.7356
# где O-это координата пересечения диагоналей, a-косинус угла между AO и BO, b-это угол между AO и BO, c-угол между BO и OC, где C-это четвертая вершина параллелограма
# 3)
d := AB×AD = [3; 0; 3]
||d|| = 4.24264
q
